# Модель Шика–Волвертона
# Допущения модели:
# 1.  время до очередного отказа распределено по экспоненциальному закону; зависит от е и то что оно возрастает
# 2.  все ошибки равновероятны и их появление не зависит друг от друга;
# 3.  частота появления ошибок (интенсивность отказов, в англоязычной литературе так же имеет название функция риска) пропорциональна числу не выявленных ошибок:
#
# l(ti)=Kjm·[E0-(i-1)] ,
#
# E0 – число ошибок в ПО до начала тестирования и отладки;
# Kjm – коэффициент Джелинского-Моранды;
# ti – интервал времени между (i-1)-й и i-й обнаруженными ошибками;
# i – число ошибок, обнаруженных к моменту отладки ti;
# 4.  l(ti) = const на интервале между двумя смежными моментами появления ошибок; интенсивность отказа в момент ти = конскт
# 5.  каждая обнаруженная ошибка в ПО немедленно устраняется и число оставшихся ошибок уменьшается на 1;
# 6.  ошибки корректируются без внесения новых ошибок.
# 7. частота появления ошибок пропорциональна времени отладки программы ti, т.е. вероятность обнаружения ошибок с течением времени должна возрастать.
#
# E0 – число ошибок в ПО до начала тестирования и отладки;
# Ksw – коэффициент Шика-Волвертона;
# ti – интервал времени между (i-1)-й и i-й обнаруженными ошибками;
# i – число ошибок обнаруженных к моменту отладки ti.
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# 1. Исходные данные
ORIGIN := 1
n := 12  # Возвращает вектор m случайных чисел, имеющих экспоненциальное распределение. r > 0 — параметр распределения.
t := rexp(n, 0.07)
t := sort(t)
t = [0.165115; 2.78566; 4.88275; 7.65904; 14.9849; 17.011; 23.477; 24.9708; 27.3599; 30.3995; 34.177; 95.2855]
# 2. Нахождение оценок числа ошибок и коэффициента Шика-Волвертона
Ksw := 0.001  # ксв приближенное значение
E0 := 20  # ксв и е0 это начальное приближение для всех неизвесьных
# е0 - это колво ошибок которые есть до начало тестирования
Given  # фунцция правдоподобия
d/dKsw(product(Ksw*(E0 - i + 1)*t[i]*e^(-Ksw*(E0 - i + 1)*t[i]^2/2), i = 1 .. n)) == 0
d/dE0(product(Ksw*(E0 - i + 1)*t[i]*e^(-Ksw*(E0 - i + 1)*t[i]^2/2), i = 1 .. n)) == 0
# е0 ограничен колво
[K1sw; E01] := Find(Ksw, E0) = [0.00151283; 24.6152]  # к1св оценка коэф
# е должно быть больше n. почему? лямбда отриц.
# 3. Оценки модели
# можем подставить м12 в лямд13 - рекурентное соотношение и так до 46
Интенсивность
i := 1 .. n
# условная плотность вероятности возникновения отказа объекта, определяемая при условии, что до рассматриваемого момента времени отказ не возник
λ[i] := K1sw*(E01 - i + 1)*t[i]
# частота появления ошибок / интенсивность отказов / функция риска
λ = [0.00614866; 0.0995199; 0.167053; 0.250451; 0.467338; 0.504793; 0.661151; 0.665442; 0.687717; 0.71813; 0.755662; 1.96264]
j := 2 .. n
T[1] := t[1]
T[j] := t[j] + T[j - 1]  # т это интервал времени между ошибками
# Т непрерывное время.
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# Среднее время безошибочной работы /  средняя наработка до следующего i-ого отказа
i := 1 .. 12
m[i] := 1/λ[i]
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i := 2 .. n
m = [162.637; 10.0482; 5.98611; 3.99279; 2.13978; 1.98101; 1.51251; 1.50276; 1.45409; 1.39251; 1.32334; 0.509519]
# Вероятность отсутсвия i-го отказа
i := 1 .. n
# функция вероятности появления ошибки
P[i] := e^(-K1sw*(E01 - i + 1)*t[i]^2/2)
P = [0.999493; 0.870564; 0.665085; 0.383234; 0.0301521; 0.0136566; 0.000426058; 0.000246456; 8.20706e-5; 1.81766e-5; 2.46552e-6; 0]
i := 2 .. n
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f[i] := K1sw*(E01 - i + 1)*t[i]*e^(-K1sw*(E01 - i + 1)*t[i]^2/2)
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