# 1. Функция плотности гамма-распределения
# k — параметр формы
# θ — параметр масштаба
f(x, k, θ) := x^(k - 1)*e^(-x/θ)*1/(Γ(k)*θ^k)
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# 2. Функция гамма-распределения
F(x, k, θ) := integral(f(x, k, θ), x = 0 .. x)
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# 3. Начальные моменты
# 1-ый начальный момент | 2-ый начальный момент | 3-ый начальный момент
α1(k, θ) := integral(x*f(x, k, θ), x = 0 .. 100)
α2(k, θ) := integral(x^2*f(x, k, θ), x = 0 .. 100)
α3(k, θ) := integral(x^3*f(x, k, θ), x = 0 .. 100)
α2(1, 1) = 2
α3(1, 1) = 6
α1(1, 1) = 1
α2(2, 0.9) = 4.86
α3(2, 0.9) = 17.496
α1(2, 0.9) = 1.8
α2(3, 0.3) = 1.08
α3(3, 0.3) = 1.62
α1(3, 0.3) = 0.9
α1(8, 0.4) = 3.2
α2(8, 0.4) = 11.52
α3(8, 0.4) = 46.08
α1(9, 0.6) = 5.4
α2(9, 0.6) = 32.4
α3(9, 0.6) = 213.84
# 4. Математическое ожидание (1-ый начальный момент)
m1(k, θ) := k*θ
m2(k, θ) := α1(k, θ)
m1(1, 1) = 1
m2(1, 1) = 1
m1(2, 0.9) = 1.8
m2(2, 0.9) = 1.8
m1(3, 0.3) = 0.9
m2(3, 0.3) = 0.9
m1(8, 0.4) = 3.2
m2(8, 0.4) = 3.2
m1(9, 0.6) = 5.4
m2(9, 0.6) = 5.4
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# 5. Мода (наиболее вероятное значение)
M0(k, θ) := (k - 1)*θ
M0(1, 1) = 0
M0(2, 0.9) = 0.9
M0(3, 0.3) = 0.6
M0(8, 0.4) = 2.8
M0(9, 0.6) = 4.8
# 6. Медиана (50%-квантиль)
Median(k, θ) := root(F(x, k, θ) - 0.5, x, k, θ)
k1 := 1
θ1 := 1
k2 := 2
θ2 := 0.9
Median(k2, θ2) = 1.51051
k3 := 3
θ3 := 0.3
Median(k3, θ3) = 0.802218
k4 := 8
θ4 := 0.4
Median(k4, θ4) = 3.0677
k5 := 9
θ5 := 0.6
Median(k5, θ5) = 5.20141
# 7. Дисперсия (2-й центральный момент)
D1(k, θ) := k*θ^2
D2(k, θ) := α2(k, θ) - α1(k, θ)^2
D1(1, 1) = 1
D2(1, 1) = 1
D1(2, 0.9) = 1.62
D2(2, 0.9) = 1.62
D1(3, 0.3) = 0.27
D2(3, 0.3) = 0.27
D1(8, 0.4) = 1.28
D2(8, 0.4) = 1.28
D1(9, 0.6) = 3.24
D2(9, 0.6) = 3.24
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# 8. Среднеквадратическое отклонение
σ(k, θ) := sqrt(D1(k, θ))
σ(1, 1) = 1
σ(2, 0.9) = 1.27279
σ(3, 0.3) = 0.519615
σ(8, 0.4) = 1.13137
σ(9, 0.6) = 1.8
# 9. Коэффициент асимметрии
μ3(k, θ) := 2*α1(k, θ)^3 - 3*α1(k, θ)*α2(k, θ) + α3(k, θ)  # (третий центральный момент)
S1(k, θ) := μ3(k, θ)/σ(k, θ)^3
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S2(k, θ) := 2/sqrt(k)
S2(1, 1) = 2
S2(2, 0.9) = 1.41421
S2(3, 0.3) = 1.1547
S2(8, 0.4) = 0.707107
S2(9, 0.6) = 0.666667
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