# 1. Гамма-распределение (функция плотности и функция распределения вероятностей)
# k — параметр формы
# θ — параметр масштаба
f(x, k, θ) := x^(k - 1)*e^(-x/θ)*1/(Γ(k)*θ^k)
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F(x, k, θ) := integral(f(x, k, θ), x = 0 .. x)
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# Математическое ожидание
m(k, θ) := k*θ
M1 := integral(x*f(x, 1, 1), x = 0 .. 10) = 0.999501
M3 := integral(x*f(x, 4, 0.4), x = 0 .. 10) = 1.6
m(1, 1) = 1
m(3, 0.3) = 0.9
m(4, 0.4) = 1.6
M2 := integral(x*f(x, 3, 0.3), x = 0 .. 10) = 0.9
M4 := integral(x*f(x, 9, 0.3), x = 0 .. 10) = 2.7
m(9, 0.3) = 2.7
# Дисперсия
D(k, θ) := k*θ^2
D1 := integral(x^2*f(x, 1, 1), x = 0 .. 10) - integral(x*f(x, 1, 1), x = 0 .. 10)^2 = 0.99546
D3 := integral(x^2*f(x, 4, 0.4), x = 0 .. 10) - integral(x*f(x, 4, 0.4), x = 0 .. 10)^2 = 0.639997
D(1, 1) = 1
D(3, 0.3) = 0.27
D(4, 0.4) = 0.64
D2 := integral(x^2*f(x, 3, 0.3), x = 0 .. 10) - integral(x*f(x, 3, 0.3), x = 0 .. 10)^2 = 0.27
D4 := integral(x^2*f(x, 9, 0.3), x = 0 .. 10) - integral(x*f(x, 4.5, 0.6), x = 0 .. 10)^2 = 0.816754
D(9, 0.3) = 0.81
# Среднеквадратическое отклонение
σ(k, θ) := sqrt(D(k, θ))
σ1 := sqrt(D1) = 0.997727
σ(1, 1) = 1
σ2 := sqrt(D2) = 0.519615
σ(3, 0.3) = 0.519615
σ(4, 0.4) = 0.8
σ3 := sqrt(D3) = 0.799998
σ(9, 0.3) = 0.9
σ4 := sqrt(D4) = 0.903744
# 2. Функциональное зависимости и параметры, полученные с помощью имитации гамма-распределения методом обратных функций
n := 10000
i := 1 .. n
a := 0
b := 1
Y1 := runif(n, a, b)
G1(i, j) := root(F(x, 1, 1) - Y1[i], x, 0, 10)
G3(i, j) := root(F(x, 4, 0.4) - Y1[i], x, 0, 10)
X11 := matrix(n, 1, G1)
X13 := matrix(n, 1, G3)
X21 := sort(X11)
X23 := sort(X13)
G2(i, j) := root(F(x, 3, 0.3) - Y1[i], x, 0, 10)
G4(i, j) := root(F(x, 9, 0.3) - Y1[i], x, 0, 10)
G1(8000, 1) = 0.539991
X12 := matrix(n, 1, G2)
X14 := matrix(n, 1, G4)
X22 := sort(X12)
X24 := sort(X14)
F(G1(8000, 1), 1, 1) = 0.417247
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# 3. Построение гистограмм распределения
bin := 40
j := 1 .. bin + 1
lower1 := floor(min(X11))
lower2 := floor(min(X12))
lower3 := floor(min(X13))
lower4 := floor(min(X14))
upper1 := ceil(max(X11))
upper2 := ceil(max(X12))
upper3 := ceil(max(X13))
upper4 := ceil(max(X14))
h1 := (upper1 - lower1)/bin
h2 := (upper2 - lower2)/bin
h3 := (upper3 - lower3)/bin
h4 := (upper4 - lower4)/bin
int1[j] := lower1 + h1*j
int2[j] := lower2 + h2*j
int3[j] := lower3 + h3*j
int4[j] := lower4 + h4*j
t1 := hist(int1, X11)/(n*h1)
t2 := hist(int2, X12)/(n*h2)
t3 := hist(int3, X13)/(n*h3)
t4 := hist(int4, X14)/(n*h4)
int1 := int1 + h1/2
int2 := int2 + h2/2
int3 := int3 + h3/2
int4 := int4 + h4/2
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j1 := 4/h1 = 16
# 4. Получение числовых оценок случайной величины
sum(t1[j]*h1, j = 0 .. j1 - 1) = 0.9778
# Математическое ожидание
integral(f(x, 1, 1), x = 0 .. 4) = 0.981684
m1 := sum(X21[i], i = 0 .. n - 1)/n
m2 := sum(X22[i], i = 0 .. n - 1)/n
m3 := sum(X23[i], i = 0 .. n - 1)/n
m4 := sum(X24[i], i = 0 .. n - 1)/n
m1 = 1.02558
m2 = 0.911606
m3 = 1.61728
m4 = 2.71787
Дисперсия
d1 := sum(X21[i]^2, i = 0 .. n - 1)/n - (sum(X21[i], i = 0 .. n - 1)/n)^2
d2 := sum(X22[i]^2, i = 0 .. n - 1)/n - (sum(X22[i], i = 0 .. n - 1)/n)^2
d1 = 1.06932
d2 = 0.284537
d3 := sum(X23[i]^2, i = 0 .. n - 1)/n - (sum(X23[i], i = 0 .. n - 1)/n)^2
d4 := sum(X24[i]^2, i = 0 .. n - 1)/n - (sum(X24[i], i = 0 .. n - 1)/n)^2
d3 = 0.672764
d4 = 0.847138
# Среднеквадратическое отклонение
sigma1 := sqrt(d1) = 1.03408
sigma2 := sqrt(d2) = 0.53342
sigma3 := sqrt(d3) = 0.820222
sigma4 := sqrt(d4) = 0.920401
# 5. Сравнение результатов
M1 = 0.999501
m1 = 1.02558
M2 = 0.9
m2 = 0.911606
M3 = 1.6
m3 = 1.61728
M4 = 2.7
m4 = 2.71787
D1 = 0.99546
d1 = 1.06932
D2 = 0.27
d2 = 0.284537
D3 = 0.639997
d3 = 0.672764
D4 = 0.816754
d4 = 0.847138
σ1 = 0.997727
sigma1 = 1.03408
σ2 = 0.519615
sigma2 = 0.53342
σ3 = 0.799998
sigma3 = 0.820222
σ4 = 0.903744
sigma4 = 0.920401
