f(x, k, θ) := x^(k - 1)*e^(-x/θ)*1/(Γ(k)*θ^k)
F(x, k, θ) := integral(f(x, k, θ), x = 0 .. x)
# 1. Исходные данные для статистического анализа
N0 := 10000
a1 := 0
b1 := 1
h := 0.01
Y1 := runif(N0, a1, b1)
G1(i, j) := root(F(x, 1, 1) - Y1[i], x, 0, 10)
G2(i, j) := root(F(x, 3, 0.3) - Y1[i], x, 0, 10)
G3(i, j) := root(F(x, 9, 0.3) - Y1[i], x, 0, 10)
X11 := matrix(N0, 1, G1)
X12 := matrix(N0, 1, G2)
X13 := matrix(N0, 1, G3)
X21 := sort(X11)
X22 := sort(X12)
X23 := sort(X13)
N2(t) :=
    i ← 0
    while t > X22[i]
        i ← i + 1
    N0 - i
N1(t) :=
    i ← 0
    while t > X21[i]
        i ← i + 1
    N0 - i
N3(t) :=
    i ← 0
    while t > X23[i]
        i ← i + 1
    N0 - i
T1max := round(max(X21)/h) = 920
T2max := round(max(X22)/h) = 417
T3max := round(max(X23)/h) = 737
Tmax := max(T1max, T2max, T3max)
i := 0 .. Tmax + 1
T[i] := i*h
i := 0 .. Tmax
# 2. Функция надёжности
P(t, a, b) := 1 - F(t, a, b)
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